*Heading
** Job name: 0_008 Model name: Model-1
** Generated by: Abaqus/CAE 2022
*Preprint, echo=NO, model=NO, history=NO, contact=NO
**
** PARTS
**
*Part, name=Part-1
*End Part
**
**
** ASSEMBLY
**
*Assembly, name=Assembly
**
*Instance, name=Part-1-1, part=Part-1
*Node
      1,          0.5,          0.5,           0.
      2,          0.5,           0.,           0.
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*Element, type=S4R
   1,    1,   10,  561,  257
   2,   10,   11,  562,  561
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*Nset, nset=Set-1, generate
     1,  10573,      1
*Elset, elset=Set-1, generate
     1,  10369,      1
** Section: Section-1
*Shell Section, elset=Set-1, material=Material-1
1., 5
*End Instance
**
*Nset, nset=Bottomedge, instance=Part-1-1
   2,   3,   6,  72,  73,  74
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*Elset, elset=Bottomedge, instance=Part-1-1
   63,  126,  189,  252,  315,  378
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*Nset, nset=Crack, instance=Part-1-1
     1,     5,   258,   259,   260,   261
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*Elset, elset=Crack, instance=Part-1-1
  3972,  4028,  4029,  4030,  4031,  4044
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*Nset, nset=Leftedge, instance=Part-1-1
     5,     6,     9,   289,   290,   291
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*Elset, elset=Leftedge, instance=Part-1-1
  4028,  4057,  4067,  4952,  4957,  4959
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*Nset, nset=Rightedge, instance=Part-1-1
   3,   4,   8, 134, 135, 136
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*Elset, elset=Rightedge, instance=Part-1-1
 3907, 3908, 3909, 3910, 3911, 3912
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*Nset, nset=Topedge, instance=Part-1-1
   7,   8,   9, 456, 457, 458
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*Elset, elset=Topedge, instance=Part-1-1
  5168,  5231,  5294,  5357,  5420,  5483
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*End Assembly
**
** MATERIALS
**
*Material, name=Material-1
*Elastic
210000., 0.3
